<?xml-stylesheet type="text/xsl" href="http://jsbsim.sourceforge.net/JSBSim.xsl"?>
<fdm_config name="quad" version="2.0" release="BETA"
    xmlns:xsi="http://www.w3.org/2001/XMLSchema-instance"
    xsi:noNamespaceSchemaLocation="http://jsbsim.sourceforge.net/JSBSim.xsd">

    <fileheader>
        <author> Jakub Výmola </author>
        <filecreationdate> 2022-10-31 </filecreationdate>
        <version> $id:quad.xml v 0.01 2022/10/31 15:32:49 Exp $ </version>
        <description> Quadrocopter </description>
    </fileheader>

    <metrics file="quad_metrics.xml" />

    <mass_balance file="quad_mass.xml" />

    <ground_reactions file="quad_ground.xml" />

    <propulsion file="quad_propulsion.xml" />

    <aerodynamics />

    <!-- ? The path is relative to {root_dir}/systems directory, hence the ".." -->
    <!-- <system file="../aircraft/quad/quad_propulsion_system.xml" /> -->
    <system file="../aircraft/quad/SensorImu_quad.xml" />
    <system file="../aircraft/quad/SensorBaro_quad.xml" />


    <!-- ==== JFP required nodes follow ==== -->

    <!-- TODO separate control data (over websocket) and visualization data and add CLI option to enable/disable user ctrl via ws -->
    <ws>
        <to_jsbsim>
            <property> user-control/channel-1 </property>
            <property> user-control/channel-2 </property>
            <property> user-control/channel-3 </property>
            <property> user-control/channel-4 </property>
            <property> user-control/channel-5 </property>
            <property> user-control/channel-6 </property>
            <property> user-control/channel-7 </property>
            <property> user-control/channel-8 </property>
        </to_jsbsim>

        <!-- Preperties will be sent via ws and can be excpected in 3d visualizer -->
        <from_jsbsim>
            <property> simulation/sim-time-sec </property>

            <property> ext/altitude-m </property>
            <property> ext/latitude-rad </property>
            <property> ext/longitude-rad </property>

            <property> ext/ecef-q-1 </property>
            <property> ext/ecef-q-2 </property>
            <property> ext/ecef-q-3 </property>
            <property> ext/ecef-q-4 </property>

            <property> ext/cg-x-m </property>
            <property> ext/cg-y-m </property>
            <property> ext/cg-z-m </property>

            <property> propulsion/engine/propeller-rpm </property>
            <property> propulsion/engine/propeller-sense </property>
            <property> propulsion/engine/thrust-lbs </property>
            <property> propulsion/engine/yaw-angle-rad </property>
            <property> propulsion/engine/pitch-angle-rad </property>

            <property> propulsion/engine[1]/propeller-rpm </property>
            <property> propulsion/engine[1]/propeller-sense </property>
            <property> propulsion/engine[1]/thrust-lbs </property>
            <property> propulsion/engine[1]/yaw-angle-rad </property>
            <property> propulsion/engine[1]/pitch-angle-rad </property>

            <property> propulsion/engine[2]/propeller-rpm </property>
            <property> propulsion/engine[2]/propeller-sense </property>
            <property> propulsion/engine[2]/thrust-lbs </property>
            <property> propulsion/engine[2]/yaw-angle-rad </property>
            <property> propulsion/engine[2]/pitch-angle-rad </property>

            <property> propulsion/engine[3]/propeller-rpm </property>
            <property> propulsion/engine[3]/propeller-sense </property>
            <property> propulsion/engine[3]/thrust-lbs </property>
            <property> propulsion/engine[3]/yaw-angle-rad </property>
            <property> propulsion/engine[3]/pitch-angle-rad </property>
        </from_jsbsim>

        <file>3d/quad_v2.obj</file>
        <node mesh="quad_fusion360_v2">
            <node mesh="aft_right_quad_fusion360_v2.001">
                <spinner_property> propulsion/engine/propeller-rpm </spinner_property>
                <prop_sense_property> propulsion/engine/propeller-sense </prop_sense_property>
                <pivot>
                    <x> 0.066538 </x>
                    <y> 0.090709 </y>
                    <z> 0.0   </z>
                </pivot>
                <axis>
                    <x> 0.0 </x>
                    <y> 0.0 </y>
                    <z> 1.0 </z>
                </axis>
            </node>
            <node>
                <position>
                    <x>  0.066538 </x>
                    <y>  0.090709 </y>
                    <z> -0.01 </z>
                </position>
                <thrust_property> propulsion/engine/thrust-lbs </thrust_property>
                <engine_pitch_property> propulsion/engine/pitch-angle-rad </engine_pitch_property>
                <engine_yaw_property> propulsion/engine/yaw-angle-rad </engine_yaw_property>
            </node>

            <node mesh="fwd_right_quad_fusion360_v2.002">
                <spinner_property> propulsion/engine[1]/propeller-rpm  </spinner_property>
                <prop_sense_property> propulsion/engine[1]/propeller-sense </prop_sense_property>
                <pivot>
                    <x> -0.066373 </x>
                    <y>  0.090825 </y>
                    <z>  0.0   </z>
                </pivot>
                <axis>
                    <x> 0.0 </x>
                    <y> 0.0 </y>
                    <z> 1.0 </z>
                </axis>
            </node>
            <node>
                <position>
                    <x> -0.066373 </x>
                    <y>  0.090825 </y>
                    <z> -0.01 </z>
                </position>
                <thrust_property> propulsion/engine[1]/thrust-lbs </thrust_property>
                <engine_yaw_property> propulsion/engine[1]/yaw-angle-rad </engine_yaw_property>
                <engine_pitch_property> propulsion/engine[1]/pitch-angle-rad </engine_pitch_property>
            </node>

            <node mesh="aft_left_quad_fusion360_v2.003">
                <spinner_property> propulsion/engine[2]/propeller-rpm  </spinner_property>
                <prop_sense_property> propulsion/engine[2]/propeller-sense </prop_sense_property>
                <pivot>
                    <x>  0.066222 </x>
                    <y> -0.090516 </y>
                    <z>  0.0   </z>
                </pivot>
                <axis>
                    <x> 0.0 </x>
                    <y> 0.0 </y>
                    <z> 1.0 </z>
                </axis>
            </node>
            <node>
                <position>
                    <x>  0.066222 </x>
                    <y> -0.090516 </y>
                    <z> -0.01 </z>
                </position>
                <thrust_property> propulsion/engine[2]/thrust-lbs </thrust_property>
                <engine_pitch_property> propulsion/engine[2]/pitch-angle-rad </engine_pitch_property>
                <engine_yaw_property> propulsion/engine[2]/yaw-angle-rad </engine_yaw_property>
            </node>

            <node mesh="fwd_left_quad_fusion360_v2.004">
                <spinner_property> propulsion/engine[3]/propeller-rpm </spinner_property>
                <prop_sense_property> propulsion/engine[3]/propeller-sense </prop_sense_property>
                <pivot>
                    <x> -0.066373 </x>
                    <y> -0.090400 </y>
                    <z>  0.0   </z>
                </pivot>
                <axis>
                    <x> 0.0 </x>
                    <y> 0.0 </y>
                    <z> 1.0 </z>
                </axis>
            </node>
            <node>
                <position>
                    <x> -0.066373 </x>
                    <y> -0.090400 </y>
                    <z> -0.01 </z>
                </position>
                <thrust_property> propulsion/engine[3]/thrust-lbs </thrust_property>
                <engine_pitch_property> propulsion/engine[3]/pitch-angle-rad </engine_pitch_property>
                <engine_yaw_property> propulsion/engine[3]/yaw-angle-rad </engine_yaw_property>
            </node>

            <!-- <node name="left_ailer">
                <angle_property> fcs/aileron </angle_property>
                <angle_offset> 0.0 </angle_offset>
                <pivot>
                    <x> 0.5 </x>
                    <y> -2.5 </y>
                    <z> 0.1 </z>
                </pivot>
                <axis>
                    <x> 0.0 </x>
                    <y> -1.0 </y>
                    <z> 0.05 </z>
                </axis>
            </node> -->
        </node>
    </ws>

    <fcs_interface>
        <!-- Sends binary data taken from sim_data JSON in the given order into the FCS -->
        <!-- (each value is 32-bit float) -->

        <!-- Retrieve properties from FCS (from sim_data JSON) back into JSBSim -->
        <to_jsbsim>
            <!-- [0,1,2,3] -->
            <property> fcs/throttle-cmd-norm[0] </property>
            <property> fcs/throttle-cmd-norm[1] </property>
            <property> fcs/throttle-cmd-norm[2] </property>
            <property> fcs/throttle-cmd-norm[3] </property>

            <!-- [4,5] -->
            <!-- <property> fcs/alt-est-m </property> -->
            <!-- <property> fcs/alt-rate-est </property> -->

            <!-- [6,7,8] -->
            <!-- <property> fcs/psi-est </property> -->
            <!-- <property> fcs/theta-est </property> -->
            <!-- <property> fcs/phi-est </property> -->

            <!-- [9,10,11] -->
            <!-- <property> fcs/lin-acc-y </property> -->
            <!-- <property> fcs/lin-acc-x </property> -->
            <!-- <property> fcs/lin-acc-z </property> -->

            <!-- [12,13,14] -->
            <!-- <property> fcs/yaw-rate-dps </property> -->
            <!-- <property> fcs/pitch-rate-dps </property> -->
            <!-- <property> fcs/roll-rate-dps </property> -->
        </to_jsbsim>

        <from_jsbsim>
            <!-- [0] -->
            <property> simulation/sim-time-sec </property>

            <!-- [1,2] -->
            <property> ext/longitude-deg </property>
            <property> ext/latitude-deg </property>

            <!-- [3,4,5] -->
            <property> sensor/imu/accelX-g </property>
            <property> sensor/imu/accelY-g </property>
            <property> sensor/imu/accelZ-g </property>

            <!-- [6,7,8] -->
            <property> sensor/imu/gyroX-rps </property>
            <property> sensor/imu/gyroY-rps </property>
            <property> sensor/imu/gyroZ-rps </property>

            <!-- [9,10] -->
            <property> sensor/baro/presStatic-Pa </property>
            <property> sensor/baro/temp-C </property>

            <!-- [11] -->
            <property> attitude/psi-deg </property>

            <!-- [12,13,14,15,16,17,18,19] -->
            <property> user-control/channel-1 </property>
            <property> user-control/channel-2 </property>
            <property> user-control/channel-3 </property>
            <property> user-control/channel-4 </property>
            <property> user-control/channel-5 </property>
            <property> user-control/channel-6 </property>
            <property> user-control/channel-7 </property>
            <property> user-control/channel-8 </property>
        </from_jsbsim>

        <telemetry>
            <property> telem/simulation/sim-time-sec </property>

            <property> telem/channel-0 </property>
            <property> telem/channel-1 </property>
            <property> telem/channel-2 </property>
            <property> telem/channel-3 </property>
            <property> telem/channel-4 </property>
            <property> telem/channel-5 </property>

            <property> telem/sensor/imu/accelX-g </property>
            <property> telem/sensor/imu/accelY-g </property>
            <property> telem/sensor/imu/accelZ-g </property>

            <property> telem/lin-acc-x-g </property>
            <property> telem/lin-acc-y-g </property>
            <property> telem/lin-acc-z-g </property>

            <property> telem/sensor/imu/gyroX-dps </property>
            <property> telem/sensor/imu/gyroY-dps </property>
            <property> telem/sensor/imu/gyroZ-dps </property>

            <property> telem/yaw </property>
            <property> telem/pitch </property>
            <property> telem/roll </property>

            <property> telem/pitch-rate-dps </property>
            <property> telem/roll-rate-dps </property>
            <property> telem/yaw-rate-dps </property>

            <property> telem/alt-rate-mps </property>

            <property> telem/throttle-cmd-norm </property>
            <property> telem/yaw-cmd-norm </property>
            <property> telem/roll-cmd-norm </property>
            <property> telem/pitch-cmd-norm </property>

            <property> telem/engine-0-cmd-norm </property>
            <property> telem/engine-1-cmd-norm </property>
            <property> telem/engine-2-cmd-norm </property>
            <property> telem/engine-3-cmd-norm </property>

            <!-- mapping attribute is used when JSBSim is not running (rt_telem or replay_telem) -->
            <!-- Given properties get mapped to sim_data based on the mapping attribute value -->
            <property mapping="ext/ecef-q-1"> telem/ecef-q-1 </property>
            <property mapping="ext/ecef-q-2"> telem/ecef-q-2 </property>
            <property mapping="ext/ecef-q-3"> telem/ecef-q-3 </property>
            <property mapping="ext/ecef-q-4"> telem/ecef-q-4 </property>


            <property> telem/pressure-pa </property>

            <property mapping="ext/altitude-m"> telem/alt-est-m </property>

            <property> telem/cpu-usage-percent </property>
        </telemetry>
    </fcs_interface>

</fdm_config>
