<?xml version="1.0" encoding="UTF-8"?>
<propeller name="New Cyclone V2 5146.5" version="1.1">
    <ixx unit="KG*M2"> 2.189e-06 </ixx> <!-- Or 1.119e-06 -->
    <diameter unit="IN"> 5.1 </diameter>
    <numblades> 3 </numblades>
    <constspeed> 0 </constspeed>

    <table name="C_THRUST" type="internal"> <!-- -->
      <tableData>
        0.00  0.1906
        0.04  0.1900
        0.08  0.1892
        0.12  0.1883
        0.16  0.1872
        0.20  0.1859
        0.24  0.1843
        0.28  0.1824
        0.32  0.1802
        0.36  0.1776
        0.40  0.1743
        0.44  0.1704
        0.48  0.1657
        0.52  0.1602
        0.56  0.1538
        0.60  0.1461
        0.64  0.1373
        0.68  0.1283
        0.72  0.1190
        0.76  0.1093
        0.80  0.0994
        0.84  0.0892
        0.88  0.0787
        0.92  0.0681
        0.96  0.0571
        1.00  0.0460
        1.04  0.0347
        1.08  0.0233
        1.12  0.0117
        1.16  0.0000
      </tableData>
    </table>

    <table name="C_POWER" type = "internal">
      <tableData>
        0.00  0.1123
        0.04  0.1148
        0.08  0.1173
        0.12  0.1198
        0.16  0.1223
        0.20  0.1247
        0.24  0.1270
        0.28  0.1292
        0.32  0.1311
        0.36  0.1327
        0.40  0.1338
        0.44  0.1344
        0.48  0.1342
        0.52  0.1333
        0.56  0.1313
        0.60  0.1281
        0.64  0.1236
        0.68  0.1186
        0.72  0.1130
        0.76  0.1067
        0.80  0.0999
        0.84  0.0923
        0.88  0.0841
        0.92  0.0752
        0.96  0.0655
        1.00  0.0551
        1.04  0.0441
        1.08  0.0326
        1.12  0.0206
        1.16  0.0086
      </tableData>
    </table>

  </propeller>
