<?xml version="1.0" encoding="UTF-8"?>
<propeller name="DJI 9450" version="1.1">
    <ixx unit="KG*M2"> 6.05e-05 </ixx> <!-- (1/12) * 12.6e-3 * (9.45*0.0254)^2 -->
    <diameter unit="IN"> 9.4  </diameter>
    <numblades> 2 </numblades>
    <constspeed> 0 </constspeed>

    <table name="C_THRUST" type="internal"> <!-- derived from APC website for the 9X4.5e -->
      <tableData>
        0.0000	0.1288
        0.0209	0.1271
        0.0522	0.1252
        0.0730	0.1230
        0.1039	0.1207
        0.1252	0.1181
        0.1470	0.1153
        0.1774	0.1122
        0.1983	0.1089
        0.2287	0.1053
        0.2504	0.1015
        0.2774	0.0975
        0.3022	0.0932
        0.3235	0.0888
        0.3539	0.0842
        0.3757	0.0794
        0.4039	0.0745
        0.4274	0.0695
        0.4496	0.0644
        0.4787	0.0592
        0.5004	0.0538
        0.5296	0.0483
        0.5526	0.0426
        0.5783	0.0369
        0.6039	0.0310
        0.6257	0.0250
        0.6548	0.0189
        0.6774	0.0128
        0.7039	0.0064
        0.7291	-0.0001
      </tableData>
    </table>

    <table name="C_POWER" type = "internal">
      <tableData>
        0.0000  0.0666
        0.0209  0.0647
        0.0522  0.0628
        0.0730  0.0611
        0.1039  0.0595
        0.1252  0.0581
        0.1470  0.0567
        0.1774  0.0554
        0.1983  0.0542
        0.2287  0.0531
        0.2504  0.0520
        0.2774  0.0509
        0.3022  0.0498
        0.3235  0.0485
        0.3539  0.0471
        0.3757  0.0456
        0.4039  0.0440
        0.4274  0.0422
        0.4496  0.0402
        0.4787  0.0381
        0.5004  0.0358
        0.5296  0.0332
        0.5526  0.0305
        0.5783  0.0275
        0.6039  0.0243
        0.6257  0.0210
        0.6548  0.0175
        0.6774  0.0137
        0.7039  0.0099
        0.7291  0.0061
      </tableData>
    </table>

  </propeller>
